// COMSOL Multiphysics 6.0.0.405 model "Modele_final2.mph"
// Outline of the model tree

Parameters
  K = .1
  k_m = 1
  kappa = 1e-3
  Pe = 8.16
  D_gamma = 1
  phi = 1

Variables
  var1 "Variables 1"
    U_ref = sqrt(intVb(u)^2+intVb(v)^2)/V_beta  // Vitesse, norme
    V_beta = intVb(1)
    U_2 = sqrt(intVb(u)^2+intVb(v)^2)

Couplings
  intop1: Integration "Intégration 1" on domains 2, 7, 12, 17, 22 | opname = intVb

Geometry
  geom1 "Géométrie 1" (2D, length unit m)
    sq1: Square "Carré 1"
    c1: Circle "Cercle 1" | pos = {0.5, 0.5}; r = 0.3
    c2: Circle "Cercle 2" | r = 0.3
    c3: Circle "Cercle 3" | pos = {0, 1}; r = 0.3
    c4: Circle "Cercle 4" | pos = {1, 0}; r = .3
    c5: Circle "Cercle 5" | pos = {1, 1}; r = .3
    sq2: Square "Carré 2"
    dif1: Difference "Différence 1" | input = c1, c2, c3, c4, c5, sq2; input2 = c2, c3, c4, c5
    arr1: Array "Réseau 1" | input = dif1, sq1; size = {5, 1}; fullsize = {5, 1}; displ = {1, 0}
    fin: Finalize "Constituer une union"

Physics
  tds: DilutedSpecies "Transport d'espèces diluées" on all domains
    dependent variable c
    cdm1: ConvectionDiffusionMigration "Propriétés de transport 1" (default)
      u_src = userdef
      u = {Pe*u/U_ref, Pe*v/U_ref, 0}
      D_c = 1[m^2/s]
    nflx1: NoFlux "Flux nul 1" (default)
    init1: init "Valeurs initiales 1" (default) | initc = 1
    reac1: Reactions "Réactions 1" on domains 1, 3-6, 8-11, 13-16, 18-21, 23-30 | R_c = -(phi^2)*c/(c+1)
    cdm2: ConvectionDiffusionMigration "Propriétés de transport 2" on domains 1, 3-6, 8-11, 13-16, 18-21, 23-30
      u = {0, 0, 0}
      D_c = D_gamma
    pc1: PeriodicCondition "Condition périodique 1" on boundaries 2, 5-9, 11, 14-18, 20, 23-27, 29, 32-36, 38, 41-45
      destinationDomains: boundaries 5, 7, 9, 14, 16, 18, 23, 25, 27, 32, 34, 36, 41, 43, 45
    conc1: Concentration on boundaries 1, 3, 4 | species = 1; c0 = 2
  spf: CreepingFlow "Ecoulement de Stokes" on domains 2, 7, 12, 17, 22
    dependent variable u = {u, v, w}
    fp1: FluidProperties "Propriétés du fluide 1" (default)
      rho_mat = userdef
      rho = 1[kg/m^3]
      mu_mat = userdef
      mu = 1[Pa*s]
    init1: init "Valeurs initiales 1" (default) | u_init = {1, 0, 0}
    wallbc1: WallBC "Paroi 1" (default)
    vf1: VolumeForce "Force volumique 1" on domains 1-25 | F = {-(1/kappa)*u, -(1/kappa)*v, 0}
    pfc1: PeriodicFlowCondition "Ecoulement périodique 1" on boundaries 2, 5-9, 11, 14-18, 20, 23-27, 29, 32-36, 38, 41-45
      destinationDomains: boundaries 7, 16, 25, 34, 43
    pfc2: PeriodicFlowCondition "Ecoulement périodique 2" on boundaries 1, 3, 4, 46-48
      pdiff = 1
      destinationDomains: boundaries 47
    gconstr1: GlobalConstraint "Contrainte globale 1" | constraintExpression = intVb(p)

Mesh
  mesh1 "Maillage 1" (physics-controlled)
    size: MeshSizeDefault "Taille" | hauto = 4

Studies
  std1 "Etude 1"
    stat: Stationary "Stationnaire"

Solver configurations
  sol1 "Solution 1" (study std1)
    v1: Variables "Variables dépendantes 1"
    s1: Stationary "Solveur stationnaire 1"
      fc1: FullyCoupled "Couplage fort 1" | linsolver = d1; initstep = 0.01; minstep = 1.0E-6; maxiter = 100
      d1: Direct "Direct, variables de l'écoulement fluide (spf) (Fusionné)" | linsolver = pardiso; pivotperturb = 1.0E-13

Datasets
  dset1: Solution | solution = sol1

Plots
  pg1: PlotGroup2D "Concentration (tds)" | data = dset1
    surf1: Surface | expr = c
    str1: Streamline "Ligne de courant 1"
      expr = {tds.tflux_cx, tds.tflux_cy}
      pointtype = arrow
      arrowlength = logarithmic
  pg2: PlotGroup2D "Vitesse (spf)" | data = dset1
    surf1: Surface | expr = u
  pg3: PlotGroup2D "Pression (spf)" | data = dset1
    con1: Contour "Isovaleurs" | expr = p; levelrounding = off